Simulations: Version=201
  DataStore
  Simulation
    Clock: Start=1980-01-01; End=1990-01-01
    Summary SummaryFile
    Weather
      FileName=/home/juice/programming/research/Gym_APSIM/Gym_APSIM/TestFiles/emerald.met
    SoilArbitrator
    Zone Field: Area=1; Slope=0; AspectAngle=0; Altitude=50
      Report: EventNames=[Maize].Harvesting
        VariableNames:
          [Maize].Phenology.ThermalTime
          [Maize].Phenology.CurrentStageName
          [Maize].AboveGround.Wt
          [Maize].AboveGround.N
          [Maize].Grain.Total.Wt*10 as Yield
          [Maize].Grain.Size
          [Maize].Grain.Number
          [Maize].Grain.Total.Wt
          [Maize].Grain.Total.N
          [Maize].Total.Wt
          [Maize].Structure.FinalLeafNumber
      Soil: ASCOrder=Vertosol; ASCSubOrder=Black; SoilType=Black Vertosol; Site=Emerald; NearestTown=Emerald; Region=Central Highlands; State=Queensland; Country=Australia; ApsoilNumber=911; Latitude=-23.5211; Longitude=148.123; YearOfSampling=0; DataSource=Collected by Brett Cocks (CES) for NVT.; Comments=Clay -
        Physical
          Thickness  ParticleSizeSand  ParticleSizeSilt  ParticleSizeClay  Rocks  BD     AirDry  LL15   DUL    SAT
          150        5                 65                30                0      1.422  0.062   0.124  0.384  0.434
          150        5                 65                30                0      1.431  0.118   0.148  0.379  0.429
          300        5                 65                30                0      1.46   0.153   0.153  0.353  0.403
          300        5                 65                30                0      1.44   0.153   0.153  0.365  0.415
          300        5                 65                30                0      1.416  0.153   0.153  0.387  0.437
          300        5                 65                30                0      1.394  0.153   0.153  0.401  0.451
          300        5                 65                30                0      1.407  0.153   0.153  0.396  0.446
          BD, DUL source: Field measured and checked for sensibility
          AirDry, LL15, SAT source: Unknown source or quality of data
          Rocks, ParticleSizeSand, ParticleSizeSilt, ParticleSizeClay source: Calculated
          SoilCrop wheatSoil: LL=[0.124, 0.148, 0.153, 0.165, 0.232, 0.291, 0.349]; KL=[0.06, 0.06, 0.06, 0.04, 0.04, 0.02, 0.01]; XF=[1, 1, 1, 1, 1, 1, 1]
            LL source: Field measured and checked for sensibility
          SoilCrop SCRUMSoil: same as Simulation.Field.Soil.Physical.wheatSoil
          SoilCrop SorghumSoil: LL=[0.124, 0.148, 0.153, 0.28, 0.312, 0.341, 0.35]; KL=[0.07, 0.07, 0.07, 0.05, 0.05, 0.04, 0.03]; XF=[1, 1, 1, 1, 1, 1, 1]
            LL, KL, XF source: Estimated
          SoilCrop CottonSoil: LL=[0.124, 0.148, 0.153, 0.267, 0.299, 0.327, 0.346]; KL=[0.1, 0.1, 0.1, 0.1, 0.09, 0.07, 0.05]; XF=[1, 1, 1, 1, 1, 1, 1]
            LL, KL, XF source: Estimated
          SoilCrop maizeSoil: same as Simulation.Field.Soil.Physical.wheatSoil
        WaterBalance SoilWater: SummerDate=1-Nov; SummerU=6; SummerCona=3.5; WinterDate=1-Apr; WinterU=2; WinterCona=2; DiffusConst=40; DiffusSlope=16; Salb=0.12; CN2Bare=73; CNRed=20; CNCov=0.8; PSIDul=-100; Thickness=[150, 150, 300, 300, 300, 300, 300]; SWCON=[0.3, 0.3, 0.3, 0.3, 0.3, 0.3, 0.3]
        Organic: FOMCNRatio=40; CarbonUnits=Total
          Thickness  Carbon  SoilCNRatio  FBiom  FInert  FOM
          150        1.24    12           0.04   0.4     347.129
          150        1.24    12           0.02   0.5     270.344
          300        1.25    12           0.02   0.7     163.972
          300        1.1     12           0.02   1       99.454
          300        0.71    12           0.01   1       60.322
          300        0.34    12           0.01   1       36.587
          300        0.34    12           0.01   1       22.191
        Chemical: PHUnits=Water
          Thickness  PH   EC   CEC
          150        7.7  0.2  11.135
          150        8.3  0.3  11.135
          300        8.5  0.5  11.1575
          300        8.6  0.8  10.82
          300        8.2  1    9.9425
          300        7.6  1.3  9.11
          300        7.7  1.3  9.11
          EC, CL, PH source: Unknown source or quality of data
          CEC source: Calculated
        Nutrient
        Solute NO3: Thickness=[300]; InitialValues=[100]; InitialValuesUnits=kg/ha; WaterTableConcentration=0; D0=0; DepthConstant=0; MaxDepthSoluteAccessible=0; RunoffEffectivenessAtMovingSolute=0; MaxEffectiveRunoff=0
        Solute NH4: Thickness=[600]; InitialValues=[0]; InitialValuesUnits=ppm; WaterTableConcentration=0; D0=0; DepthConstant=0; MaxDepthSoluteAccessible=0; RunoffEffectivenessAtMovingSolute=0; MaxEffectiveRunoff=0
        Solute Urea: Thickness=[150, 150, 300, 300, 300, 300, 300]; InitialValues=[0, 0, 0, 0, 0, 0, 0]; InitialValuesUnits=kg/ha; WaterTableConcentration=0; D0=0; DepthConstant=0; MaxDepthSoluteAccessible=0; RunoffEffectivenessAtMovingSolute=0; MaxEffectiveRunoff=0
        Water: Thickness=[150, 150, 300, 300, 300, 300, 300]; InitialValues=[0.174, 0.193, 0.192, 0.194, 0.198, 0.201, 0.2]; FilledFromTop=false
        SoilTemperature CERESSoilTemperature
        CERESSoilTemperature Temperature
      Fertiliser
      Irrigation
      SurfaceOrganicMatter: InitialResidueName=wheat_stubble; InitialResidueType=wheat; InitialResidueMass=500; InitialStandingFraction=0; InitialCPR=0; InitialCNR=100
      Plant Maize
      MicroClimate: a_interception=0; b_interception=1; c_interception=0; d_interception=0; SoilHeatFluxFraction=0.4; MinimumHeightDiffForNewLayer=0; NightInterceptionFraction=0.5; ReferenceHeight=2
      Manager SowingFertiliser (disabled)
        Amount = 160
        CropName = maize
```csharp
using Models.Soils;
using System.Linq;
using System;
using Models.Core;
using Models.PMF;
namespace Models
{
    [Serializable]
    public class Script : Model
    {
        [Link] Clock Clock;
        [Link] Fertiliser Fertiliser;
        [Link] Summary Summary;
        
        
        [Description("Amount of fertiliser to be applied (kg/ha)")]
        public double Amount { get; set;}
        
        [Description("Crop to be fertilised")]
        public string CropName { get; set;}
        
        
        

        [EventSubscribe("Sowing")]
        private void OnSowing(object sender, EventArgs e)
        {
            Model crop = sender as Model;
            if (crop.Name.ToLower()==CropName.ToLower())
                Fertiliser.Apply(amount: Amount, type: "NO3N");
        }
        
    }
}
```
      Manager Harvest (disabled)
```csharp
using Models.Soils.Nutrients;
using System.Linq;
using System;
using Models.Core;
using Models.PMF;
using Models.Soils;
using Models.Soils.Nutrients;
using Models.Utilities;
using APSIM.Shared.Utilities;

namespace Models
{
    [Serializable]
    public class Script : Model
    {
        [Link] Plant Maize;

        [EventSubscribe("DoManagement")]
        private void OnDoManagement(object sender, EventArgs e)
        {
            if (Maize.IsReadyForHarvesting)
            {
               Maize.Harvest();
               Maize.EndCrop();    
            }
        
        }
        
    }
}
```
      Manager SowingRule1
        StartDate = 1-nov
        EndDate = 30-dec
        MinESW = 100
        MinRain = 0
        RainDays = 7
        CultivarName = sc401
        SowingDepth = 30
        RowSpacing = 1000
        Population = 6
```csharp
using APSIM.Numerics;
using Models.Climate;
using APSIM.Shared.Utilities;
using Models.Utilities;
using Models.Soils.Nutrients;
using Models.Soils;
using Models.PMF;
using Models.Core;
using System;
using System.Linq;
using Models.Interfaces;

namespace Models
{
    [Serializable]
    public class Script : Model
    {
        [Link] private Clock Clock;
        [Link] private Fertiliser Fertiliser;
        [Link] private Summary Summary;
        [Link(ByName = true)] private Plant Maize;
        [Link] private Soil Soil;
        private Accumulator accumulatedRain;
        [Link]
        private ISoilWater waterBalance;
        
        [Description("Start of sowing window (d-mmm)")]
        public string StartDate { get; set;}
        [Description("End of sowing window (d-mmm)")]
        public string EndDate { get; set;}
        [Description("Minimum extractable soil water for sowing (mm)")]
        public double MinESW { get; set;}
        [Description("Accumulated rainfall required for sowing (mm)")]
        public double MinRain { get; set;}
        [Description("Duration of rainfall accumulation (d)")]
        public int RainDays { get; set;}
        [Description("Cultivar to be sown")]
        [Display(Type=DisplayType.CultivarName, PlantName = "Wheat")]
        public string CultivarName { get; set;}
        [Description("Sowing depth (mm)")]
        public double SowingDepth { get; set;}        
        [Description("Row spacing (mm)")]
        public double RowSpacing { get; set;}    
        [Description("Plant population (/m2)")]
        public double Population { get; set;}    
        
        
        [EventSubscribe("StartOfSimulation")]
        private void OnSimulationCommencing(object sender, EventArgs e)
        {
            accumulatedRain = new Accumulator(this, "[Weather].Rain", RainDays);
        }
        

        [EventSubscribe("DoManagement")]
        private void OnDoManagement(object sender, EventArgs e)
        {
            accumulatedRain.Update();
            
            if (DateUtilities.WithinDates(StartDate,Clock.Today,EndDate) &&
                !Maize.IsAlive &&
                MathUtilities.Sum(waterBalance.ESW) > MinESW &&
                accumulatedRain.Sum > MinRain)
            {
               Maize.Sow(population:Population, cultivar:CultivarName, depth:SowingDepth, rowSpacing:RowSpacing);    
            }
        }
    }
}
```
      Manager
        DummyStringVar = garbage
        DummyDoubleVar = 562.5
```csharp
using APSIM.Core;
using APSIM.Shared.Utilities;
using Models.Utilities;
using Models.Soils;
using Models.Climate;
using Models.Functions;
using Models.PMF.Struct;
using Models.PMF.Phen;
using Models.PMF;
using Models.Core;
using System;
using System.Linq;
using Models.Soils.Nutrients;

namespace Models
{
    [Serializable]
    public class Script : Model, IStructureDependency
    {
        [Link] private Simulation simulation;
        [Link] private Clock Clock;
        [Link] private Weather Weather;
        [Link] private Fertiliser Fertiliser;
        [Link] private Plant Maize;
        [Link (ByName = true)] private HoldFunction FinalLeafNumber;
        [Link (ByName=true)] private NFlow Denitrification;
        public IStructure Structure { private get; set; }

        [Description("DummyStringVar")]
        //public string DummyStringVar { get {return("garbage");} set {Console.WriteLine("Dummy set to " + value);}}
        public string DummyStringVar { get ; set ;}


        [Description("DummyDoubleVar")]
        //public double DummyDoubleVar { get {return(-1.0);} set {Console.WriteLine("Dummy double set to " + value.ToString());}}
        public double DummyDoubleVar { get ; set ;}
            

        public double cumsumfert {get ; set;}
        
        

        [EventSubscribe("StartOfSimulation")]
        private void OnSimulationCommencing(object sender, EventArgs e)
        {
           cumsumfert = 0;
        }
        
        [EventSubscribe("EndOfDay")]
        private void OnEndOfDay(object sender, EventArgs e) {
            var applied = Fertiliser.NitrogenApplied;
            if (applied > 0)
               cumsumfert += applied; 
        }
        
        public double dap {
        get {
           var daysSinceStart = (Clock.Today.Date - Clock.StartDate).TotalDays;
           return( daysSinceStart);
        }
        set {}}
        

        public double istage {
        get {
           if (Maize.IsAlive) {
             return( Maize.Phenology.IndexFromPhaseName(Maize.Phenology.CurrentPhaseName) );
           }
           return (-1);
        }
        set {}}

        public double vstage {
        get {
           if (Maize.IsAlive) {
              var fln = ((IFunction)Structure.Get("[Maize].Structure.FinalLeafNumber", relativeTo: simulation)).Value();
              return( fln );
           }
           return (-1);
        }
        set {}}

        public double dnit {
        get {
           double dnit = Denitrification.Value.Sum();
           return (dnit);
        }
        set {}}



    }
}
```
      Manager NO3Management (disabled)
```csharp
using Models.Soils.Nutrients;
using System.Linq;
using System;
using Models.Core;
using Models.PMF;
using Models.Soils;
using Models.Soils.Nutrients;
using Models.Utilities;

using APSIM.Shared.Utilities;

namespace Models
{
    [Serializable]
    public class NO3Script : Model
    {
        [Link] Simulation simulation;
        [Link] Clock Clock;
        [Link] Fertiliser Fertiliser;
        [Link] Nutrient Nutrient;
        [Link (ByName = true)] Solute NO3; // a child of ^^
            
        [EventSubscribe("StartOfSimulation")]
        private void OnSimulationCommencing(object sender, EventArgs e)
        {
        }
        public void AddFertiliser(double Amount /* in kg/ha*/)
        {
            Fertiliser.Apply(amount: Amount, type: "NO3N");
        }
        public void SetNO3(double Amount /* in kg/ha*/)
        {
           double [] values = new double[Nutrient.NO3.kgha.Length];
           values[0] = Amount * 0.9;
           values[1] = Amount * 0.1;
           // remaining are 0
           
           Nutrient.NO3.SetKgHa(SoluteSetterType.Other, values);
        }
    }
}
```
      Manager Synchroniser
        Identifier = <undefined>
```csharp
using APSIM.Core;
using APSIM.Shared.Utilities;
using NetMQ.Sockets;
using NetMQ;
using Models.Storage;
using System.Collections.Generic;
using System.IO;
using MessagePack;
using Models.Functions;
using Models.Utilities;
using Models.Soils.Nutrients;
using Models.Surface;
using Models.Soils;
using Models.PMF;
using Models.Interfaces;
using Models.Core;
using System;
using System.Linq;

namespace Models
{
    [Serializable]
    public class Script : Model, IStructureDependency
    {
        [Link] private Clock clock;
        [Link] private Simulation simulation;
        [Link] private Summary Summary;
        [NonSerialized]
        private RequestSocket connection;
        public IStructure Structure { private get; set; }
        
        [Description("Identifier")]
        public string Identifier { get; set;}

            
        

        [EventSubscribe("StartOfSimulation")]
        private void OnSimulationCommencing(object sender, EventArgs e)
        {
           if (Identifier == "<undefined>") {
               Console.WriteLine("Need an endpoint to connect to");
               Summary.WriteMessage(this, "Need an endpoint to connect to", MessageType.Error);
               return;
           } 
           Identifier = "tcp://" + Identifier;
           connection = new RequestSocket(Identifier);
           connection.SendFrame("connect");
           var msg = connection.ReceiveFrameString(); 
           if (msg != "ok") { throw new Exception("Expected ok"); }
        }
        
        [EventSubscribe("EndOfDay")]
        private void OnEndOfDay(object sender, EventArgs e)
        {
           if (connection == null) { return; }
           bool moreToDo = true;
           connection.SendFrame("paused");
           while (moreToDo) {
             var msg = connection.ReceiveMultipartMessage();
             //Console.WriteLine("Got {0} parts, first = {1}", msg.FrameCount, msg[0].ConvertToString()); 
             if (msg.FrameCount <= 0) { continue ; }
              
             var command = msg[0].ConvertToString();
             if (command == "resume") { 
                moreToDo = false;
                
             } else if (command == "do" && msg.FrameCount >= 2) {
                 onDoCommand(msg);
                 connection.SendFrame("ok");
                 
             } else if (command == "set" && msg.FrameCount == 3) {
                 // set an apsim variable. 
                 //  arg 1 is the variable path (eg "[Nutrient].NO3.kgha"), 
                 //  arg 2 is the packed object                
                string variableName = MessagePackSerializer.Deserialize<string>( msg[1].Buffer );
                
                // See what type the apsim variable is
                var myType = Structure.Get(variableName, relativeTo: simulation).GetType();
                //Console.WriteLine("Got set {0}, my type is {1}", variableName, myType);
                
                object value = MessagePackSerializer.Deserialize<object>( msg[2].Buffer );
                //Console.WriteLine("Got set {0} of incoming type {1}", variableName, value.GetType());
                if (value.GetType().IsArray != myType.IsArray) 
                   throw new Exception("Array/scalar mismatch for " + variableName);
                    
                if (myType.IsArray) {
                   Type myElementType = myType.GetElementType();
                   Object[] values = (value as object[]);
                   if (isNumeric(myElementType)) {
                      var myValues = Array.ConvertAll(values, (e) => (double) e);
                      Structure.Set(variableName, myValues, relativeTo: simulation);
                   } else if (isInteger(myElementType)) {
                      var myValues = Array.ConvertAll(values, (e) => (int) e);
                      Structure.Set(variableName, myValues, relativeTo: simulation);
                   } else if (isString(myElementType)) {
                      var myValues = Array.ConvertAll(values, (e) => (string) e);
                      Structure.Set(variableName, myValues, relativeTo: simulation);
                   } else {
                      throw new Exception("Don't know what to do setting a " + myElementType + " variable");
                   }
                
                   //Type myElementType = myType.GetElementType();
                   //var values = Array.ConvertAll((object[])value, (e) => Convert.ChangeType(e, myElementType)) as System.Array;
                   //Console.WriteLine("Doing set {0} of type {1} ({2}) = ", variableName, 
                   //                  values.GetType(), values.GetType().GetElementType(),  
                   //                  values.GetValue(0).ToString());
                   //Structure.Set(variableName, values, relativeTo: simulation);
                } else {
                   Structure.Set(variableName, Convert.ChangeType(value, myType), relativeTo: simulation);
                }
                connection.SendFrame("ok");
                
             } else if (command == "get" && msg.FrameCount == 2) {
                string variableName = MessagePackSerializer.Deserialize<string>( msg[1].Buffer );
                object value = Structure.Get(variableName, relativeTo: simulation);
                if (value is IFunction function)
                    value = function.Value();
                else if (value != null && (value.GetType().IsArray || value.GetType().IsClass))
                {
                   try
                   {
                       value = ReflectionUtilities.Clone(value);
                   }
                   catch (Exception err)
                   {
                       throw new Exception($"Cannot report variable \"{variableName}\": Variable is a non-reportable type: \"{value?.GetType()?.Name}\".", err);
                   }
                }
                //Console.WriteLine("Got get '{0}' of type '{1}'", variableName, value?.GetType()); 
             
                byte[] bytes;
                if (value != null) {
                   bytes = MessagePackSerializer.Serialize(value);
                } else {
                   Console.WriteLine("Sending NA"); 
                   bytes = MessagePackSerializer.Serialize("NA"); // fixme. Probably a better way to do this
                } 

                connection.SendFrame(bytes);
             } else {
                throw new Exception("Expected resume/get/set, not '" + command + "'");
             }
           }
        }
        
        [Link] Clock Clock;
        [Link] ISoilWater SoilWater;
        [Link] Nutrient Nutrient;
        [Link] Fertiliser Fertiliser;
        [Link] Irrigation Irrigation;
        [Link] SurfaceOrganicMatter SOM;
        [Link] Report Report;

        // Handle a command:
        // addFertiliser "amount" <double> "type" <string>
        // sowCrop "cropName" <string> "cultivarName" <string> "population" <double> "sowingDepth" <double> "rowSpacing" <double> 
        // harvestCrop "cropName" <string>
        // applyIrrigation "amount" <double>
        // tillage "type" <string : (chisel|disc|planter|burn)>
        // terminate
        
        public void onDoCommand(NetMQMessage msg) {
             // msg[0] is "do"
             var cmd = MessagePackSerializer.Deserialize<string>( msg[1].Buffer);
             if (cmd == "addFertiliser") {
                 double FertAmount = 0;
                 string FertType = "";
                 for (int i = 2; i < msg.FrameCount; i += 2 ) {
                    var vname = MessagePackSerializer.Deserialize<string>( msg[i].Buffer);
                    if ( vname == "amount" ) {
                        FertAmount = MessagePackSerializer.Deserialize<double>( msg[i + 1].Buffer);
                    } else if ( vname == "type" ) {
                        FertType = MessagePackSerializer.Deserialize<string>( msg[i + 1].Buffer);
                    }
                 }
                 if (FertAmount > 0) {
                    Console.WriteLine("Applying Fertiliser, amt={0} ", FertAmount); 
                    Fertiliser.Apply(amount: FertAmount, type: "NO3N" /* fixme */);
                 }
             } else if (cmd == "sowCrop") {
                 string cropName = "";
                 string cultivarName = "default";
                 double population = 5;
                 double sowingDepth = 50;
                 double rowSpacing = 1000;
                 for (int i = 2; i < msg.FrameCount; i += 2 ) {
                    var vname = MessagePackSerializer.Deserialize<string>( msg[i].Buffer);
                    if ( vname == "cropName" ) {
                        cropName = MessagePackSerializer.Deserialize<string>( msg[i + 1].Buffer);
                    } else  if ( vname == "cultivarName" ) {
                        cultivarName = MessagePackSerializer.Deserialize<string>( msg[i + 1].Buffer);
                    } else if ( vname == "population" ) {
                        population = MessagePackSerializer.Deserialize<double>( msg[i + 1].Buffer);
                    } else if ( vname == "sowingDepth" ) {
                        sowingDepth = MessagePackSerializer.Deserialize<double>( msg[i + 1].Buffer);
                    } else if ( vname == "rowSpacing" ) {
                        rowSpacing = MessagePackSerializer.Deserialize<double>( msg[i + 1].Buffer);
                    }
                 }
                 if (cropName != "") {
                    Plant crop = Structure.GetObject("[" + cropName + "]")?.Value as Plant;
                    if (crop == null) { throw new Exception("Cant find a component called  '" + cropName + "' to sow"); } 
                    crop.Sow(population:population, cultivar:cultivarName, depth:sowingDepth, rowSpacing:rowSpacing);
                    Console.WriteLine("Sowed a {0} crop", cropName); 
                 }    
             } else if (cmd == "harvestCrop") {
                 string cropName = "";
                 for (int i = 2; i < msg.FrameCount; i += 2 ) {
                    var vname = MessagePackSerializer.Deserialize<string>( msg[i].Buffer);
                    if ( vname == "cropName" ) {
                        cropName = MessagePackSerializer.Deserialize<string>( msg[i + 1].Buffer);
                    }
                 }
                 if (cropName != "") {
                    Plant crop = Structure.GetObject("[" + cropName + "]")?.Value as Plant;
                    if (crop == null) { throw new Exception("Cant find a component called  '" + cropName + "' to harvest"); }
                    crop.Harvest();
                    Console.WriteLine("Harvested a {0} crop", cropName); 
                    crop.EndCrop();
                 } 
             } else if (cmd == "applyIrrigation") {
                 double irrigAmount = 0;
                 for (int i = 2; i < msg.FrameCount; i += 2 ) {
                    var vname = MessagePackSerializer.Deserialize<string>( msg[i].Buffer);
                    if ( vname == "amount" ) {
                        irrigAmount = MessagePackSerializer.Deserialize<double>( msg[i + 1].Buffer);
                    }
                 }
                 if (irrigAmount > 0) {
                    Irrigation.Apply(amount:irrigAmount, willRunoff:true);
                    Console.WriteLine("Irrigated {0} ", irrigAmount, "mm"); 
                 }
                 
             } else if (cmd == "tillage") {
                 string implementName = "";
                 for (int i = 2; i < msg.FrameCount; i += 2 ) {
                    var vname = MessagePackSerializer.Deserialize<string>( msg[i].Buffer);
                    if ( vname == "type" ) {
                        implementName = MessagePackSerializer.Deserialize<string>( msg[i + 1].Buffer);
                    }
                 }
                 if ( TillageTypes.ContainsKey(implementName) ) {
                    TillageType tillageType = TillageTypes[implementName];
                    SOM.Incorporate(tillageType.fraction, tillageType.depth);
                    Console.WriteLine("Tilled with a {0}", implementName); 
                 } else {
                    throw new Exception("Cant find a tillage method called  '" + implementName + "' to till with");
                 }
             } else if (cmd == "do_rewind") {
                 Console.WriteLine("Resetting"); 
                 SoilWater.Reset();
                 Nutrient.Reset();
                 SOM.Reset();
                 clock.Today = clock.StartDate.AddDays(-1);
                 
                 //Report.OnCompleted(this, null); // requires changing Models/Report.cs to allow public access
                 Summary.WriteSummaryToTextFiles(storage, "SummaryMessages.html", false);
             
             } else if (cmd == "terminate") {
                 clock.EndDate = clock.StartDate;
             }
        }
        [Link] IDataStore storage;
        
        private class TillageType {
           public double fraction;
           public double depth;
        }
        [NonSerialized]
        private static readonly Dictionary<string, TillageType> TillageTypes = new Dictionary<string, TillageType> { 
           {"chisel", new TillageType { fraction = 0.5, depth = 100 }},
           {"disc", new TillageType { fraction =  0.5, depth = 200 }},
           {"planter", new TillageType { fraction = 0.1, depth = 50 }}, 
           {"burn", new TillageType { fraction = 1.0, depth = 0}}
        };

        [EventSubscribe("EndOfSimulation")]
        private void OnSimulationEnding(object sender, EventArgs e)
        {
            if (connection == null) { return; }
            
            connection.SendFrame("finished");
            var msg = connection.ReceiveFrameString(); 
            if (msg != "ok") { throw new Exception("Expected ok at end"); }
            connection.Close();
            
            Console.WriteLine("Simulation Ending");
        }
        static bool isNumeric(Type type) {
                         switch (Type.GetTypeCode(type))
                            {
                                case TypeCode.Double:
                                case TypeCode.Single:
                                   return true;
                            }
                            return false;
                        }
                        static bool isInteger(Type type) {
                         switch (Type.GetTypeCode(type))
                            {
                                case TypeCode.Int16:
                                case TypeCode.Int32:
                                case TypeCode.Int64:
                                case TypeCode.UInt16:
                                case TypeCode.UInt32:
                                case TypeCode.UInt64:
                                   return true;
                            }
                            return false;
                        }
                        static bool isString(Type type) {
                         switch (Type.GetTypeCode(type))
                            {
                                case TypeCode.String:
                                   return true;
                            }
                            return false;
                        }       
   }
}
```
